// COMSOL Multiphysics 4.3.2.152 model "fibra_Ge_Si.mph"
// Outline of the model tree

Parameters
  Delta = 0.003
  n1 = 1.444  // indice do núcleo
  n0 = n1*sqrt(1-2*Delta)  // índice da casca
  q = 2
  micron = 1.0[um]
  omega0 = 2*pi*c_const/lambda0
  f0 = c_const/lambda0  // frequencia
  a = 4[um]  // raio do nucleo da SMF
  b0 = 30e-06  // raio do núcleo da MMF
  c = 60e-6[m]
  m = 0[1]
  lambda0 = 1.45e-6[m]
  SA1 = 0.6961663
  SA2 = 0.4079426
  SA3 = 0.8974794
  SL1 = 0.0684043[um]
  SL2 = 0.1162414[um]
  SL3 = 9.89616[um]
  GA1 = 0.80686642
  GA2 = 0.71815848
  GA3 = 0.85416831
  GL1 = 0.068972606[um]
  GL2 = 0.15396605[um]
  GL3 = 11.841931[um]
  xmolG = 0.1934  // GeO2 concentration for a Thorlabs GRIN fiber, see GRIN_Fleming.nb
  xmolS = 0.033  // GeO2 concentration for a SMF fiber.
  wl = lambda0
  t = 24  // temperatura
  t0 = 24
  b_bkp = 30e-6[m]
  metro = 1[m]  // metro
  tau_c = 1.10e-5  // thermo-optic coefficient
  tau_n = 1.29e-5
  alpha = 5e-5
  b = b0 + alpha * b0 * (t- t0)

Functions
  an1: Analytic "n2" | funcname = n2; expr = n1*sqrt(1-2*Delta*((x^2+y^2)^(q/2)/b^q)); args = {x, y}; argunit = m; fununit = 1

Variables
  var1 "Variables 1a"
    ncore = sqrt(1+(SA1+xmol*(GA1-SA1))*wl^2/(wl^2-(SL1+xmol*(GL1-SL1))^2)+(SA2+xmol*(GA2-SA2))*wl^2/(wl^2-(SL2+xmol*(GL2-SL2))^2)+(SA3+xmol*(GA3-SA3))*wl^2/(wl^2-(SL3+xmol*(GL3-SL3))^2))
  var2 "Variables 2a" on domains 2, 3
    xmol = xmolG
    tau = tau_n
  var3 "Variables 3a" on domains 1
    xmol = xmolS
    tau = tau_c
  var4 "Variables 4"
    ntemp = (ncore + tau*(t - t0) )
  var5 "Variables 5" (disabled)
    b = b0 + alpha * b0 * (t- t0)

Geometry
  geom1 "Geometry 1" (2D, length unit µm)
    c1: Circle | pos = {m*micron, 0}; r = a
    c2: Circle | r = b*metro
    c3: Circle | r = c
    fin: Finalize "Form Union"

Physics
  emw: ElectromagneticWaves "SMF Electromagnetic Waves, Frequency Domain" on all domains
    dependent variable E = {Ex, Ey, Ez}
    wee1: WaveEquationElectric (default)
      DisplacementFieldModel = RefractiveIndex
      n_mat = userdef
      n = n0
      ki_mat = userdef
      ki = 0
    pec1: PerfectElectricConductor (default)
    init1: init "Initial Values 1" (default)
    wee2: WaveEquationElectric on domains 3
      DisplacementFieldModel = RefractiveIndex
      epsilonPrim_mat = userdef
      epsilonPrim = n1
      delta_mat = userdef
      delta = 0
      n_mat = userdef
      n = n1
      ki_mat = userdef
      ki = 0
  emw2: ElectromagneticWaves "GrIn Electromagnetic Waves, Frequency Domain 2" on all domains
    dependent variable E2 = {E2x, E2y, E2z}
    wee1: WaveEquationElectric (default)
      DisplacementFieldModel = RefractiveIndex
      n_mat = userdef
      n = ntemp
      ki_mat = userdef
      ki = 0
    pec1: PerfectElectricConductor (default)
    init1: init "Initial Values 1" (default)
    wee2: WaveEquationElectric on domains 2, 3
      DisplacementFieldModel = RefractiveIndex
      n_mat = userdef
      n = ntemp
      ki_mat = userdef
      ki = 0

Mesh
  mesh1 "Mesh 1"
    size: MeshSizeDefault | hmax = 8.04; hmin = 0.036; hcurve = 0.3; hnarrow = 1; hgrad = 1.3; hauto = 5
    ftri1: FreeTri "Free Triangular 1" on remaining entities
    ref1: Refine on domains 2, 3 | numrefine = 2
    ref2: Refine on domains 2

Studies
  std1 "Study 1"
    mode: ModeAnalysis | neigs = 6; shift = 1.45; modeFreq = f0; solve for = {emw}
  std2 "Study 2"
    mode: ModeAnalysis | neigs = 20; shift = 1.48; modeFreq = f0; solve for = {emw2}

Solver configurations
  sol1 "Solver 1" (study std1)
    v1: Variables "Dependent Variables 1"
    e1: Eigenvalue "Eigenvalue Solver 1" | transform = effective_mode_index; shift = 1.45
      dDef: Direct
  sol2 "Solver 2" (study std2)
    v1: Variables "Dependent Variables 1"
    e1: Eigenvalue "Eigenvalue Solver 1" | neigs = 20; transform = effective_mode_index; shift = 1.48
      dDef: Direct

Datasets
  dset1: Solution | solution = sol1
  dset2: Solution | solution = sol2
  join1: Join | data = dset1; solutions = one; data2 = dset2; solutions2 = one; method = explicit; expr = data1-data2

Derived values
  int1: IntSurface "Surface Integration 1"
    data = join1
    table = tbl1
    expr = data1(emw.normE)*data2(emw2.normE)
    unit = m^4*kg^2/(s^6*A^2)
    dataseries = integral

Tables
  tbl1: Table
    // Surface Integration 1 (data1(emw.normE)*data2(emw2.normE))
    Integral: data1(emw.normE)*data2(emw2.normE) (m^4*kg^2/(s^6*A^2)) | Integral: data1(emw.normE)*data2(emw2.normE) (m^4*kg^2/(s^6*A^2)) | Integral: data1(emw.normE)*data2(emw2.normE) (m^4*kg^2/(s^6*A^2))
    7250.06 | 11175.1 | 22637.4

Plots
  pg1: PlotGroup2D "Electric Field (emw)" | data = dset1
    surf1: Surface | data = dset1; expr = emw.normE
  pg2: PlotGroup2D "2D Plot Group 2" | data = dset2
    surf1: Surface | data = dset2; expr = emw2.normE^2; unit = m^2*kg^2/(s^6*A^2)
  pg3: PlotGroup2D "2D Plot Group 3" | data = join1
    surf1: Surface | data = dset2; expr = data1(emw.normE)*data2(emw2.normE)
  pg4: PlotGroup2D "2D Plot Group 4" | data = dset2
    surf1: Surface | data = dset2; expr = ntemp

Exports
  data1: Data
    data = dset1
    expr = emw.normE
    unit = V/m
    descr = Electric field norm
    filename = /Users/paulogomestl/Documents/Dropbox/Profissional/Jatai/2015/pesquisas/Simulacao/Grisoto/01janeiro/24janeiro/fibra1E1.csv
    location = grid
    gridx2 = range(-60,5,-45) range(-44,1,-41) range(-40,0.2,40) range(41,1,44) range(45,5,60)
    gridy2 = range(-60,5,-45) range(-44,1,-41) range(-40,0.2,40) range(41,1,44) range(45,5,60)
  data2: Data
    data = dset2
    expr = emw2.normE
    unit = V/m
    descr = Electric field norm
    filename = /Users/paulogomestl/Documents/Dropbox/Profissional/Jatai/2015/pesquisas/Simulacao/Grisoto/01janeiro/24janeiro/fibra2E6.csv
    location = grid
    gridx2 = range(-60,5,-45) range(-44,1,-41) range(-40,0.2,40) range(41,1,44) range(45,5,60)
    gridy2 = range(-60,5,-45) range(-44,1,-41) range(-40,0.2,40) range(41,1,44) range(45,5,60)
  data3: Data
    data = dset2
    expr = emw2.beta
    descr = Propagation constant
    filename = /Users/paulogomestl/Documents/Dropbox/Profissional/Jatai/2015/pesquisas/Simulacao/Grisoto/01janeiro/24janeiro/fibra2E6.csv
    location = grid
    gridx2 = range(-60,5,-45) range(-44,1,-41) range(-40,0.2,40) range(41,1,44) range(45,5,60)
    gridy2 = range(-60,5,-45) range(-44,1,-41) range(-40,0.2,40) range(41,1,44) range(45,5,60)
  data4: Data
    data = dset2
    expr = ntemp
    filename = /mnt/dados/Comp/Projeto_optics/novafiber/abril2015/temperatura/teste1.txt
    location = grid
    gridx2 = range(-50,50,1)
    gridy2 = range(0,50,1)
  img1: Image2D "2D Image 1"
    size = manual
    unit = px
    width = 800
    height = 600
    pngfilename = /mnt/dados/Comp/Projeto_optics/novafiber/abril2015/temperatura/teste_1.png
    options = off
    axes = on